// COMSOL Multiphysics 6.1.0.282 model "morir.mph"
// Outline of the model tree

Parameters
  WEBhight = 112[mm]+2*r  // Hight of the web in IPE
  WEBwidth = 4.7[mm]  // Width of the web in IPE
  FLANGEhight = 7[mm]  // Hight of the flange in IPE
  FLANGEwidth = 73[mm]  // Width of the flange in IPE
  XWEB = -WEBwidth/2  // Web position in x-direction
  YWEB = -(FLANGEhight/2+WEBhight)  // Web position in y-direction
  XFLANGE = -FLANGEwidth/2  // Bottom flange position in x-direction
  YFLANGE = -(FLANGEhight/2+WEBhight+FLANGEhight)  // Bottom flange position in y-direction
  r = 7[mm]  // Fillet radios of the Web-Flange connection
  lenght = 0.48[m]  // Lenght of the beam
  Xpos = 0[m]  // Position of the Beam in X direction
  Ypos = 0[m]  // Position of the Beam in Y direction
  Zpos = 0[m]  // Position of the Beam in Z direction
  PZTradius = 1[cm]
  PZTwidth = 2[mm]
  TotHight = FLANGEhight*2+WEBhight
  xPZT1 = 0.0365[m]
  yPZT1 = 0.14[m]
  zPZT1 = 0.08[m]
  DensityS = 7.85[g/cm^3]  // Density
  ElasticityS = 200[GPa]  // Elasticity modulus
  PoissonS = 0.3  // poisson ratio
  dampB = 1e-8
  RDam = 0.75[cm]
  HDam = 0.86e-2
  DenDam = 7.5[g/cm^3]
  xD = 5.5e-2
  zD = 2e-2
  DenMag = 7.5[g/cm^3]
  EMag = 1.6e11[Pa]
  piossionMag = 0.24
  a = 0

Selections
  sel1: Explicit on no points

Common definitions
  mpf1: ParticipationFactors

Geometry
  geom1 "Geometry" (3D, length unit m)
    wp1: WorkPlane "xy-BeamCrossSection" | unite = on; workplane3d = off
      r1: Rectangle | base = center; size = {FLANGEwidth, FLANGEhight}
      r2: Rectangle | pos = {XWEB, YWEB}; size = {WEBwidth, WEBhight}
      r3: Rectangle | pos = {XFLANGE, YFLANGE}; size = {FLANGEwidth, FLANGEhight}
      uni1: Union | input = r1, r2, r3; intbnd = off; edge = all
      fil1: Fillet | point = uni1(1) points 6; radius = r
      fil2: Fillet | point = fil1(1) points 9; radius = r
      fil3: Fillet | point = fil2(1) points 6, 8; radius = r
    ext1: Extrude | workplane = wp1; input = wp1; distance = lenght
    mov1: Move | input = ext1; workplane = wp1; specify = pos; displx = Xpos; disply = Ypos; displz = Zpos; newpos = coord
    wp2: WorkPlane "zx-Top-Flange plane"
      planetype = faceparallel
      quickplane = zx
      face = mov1(1) boundaries 8
      originvertex = mov1(1) points 7
      origin = vertexproj
      unite = on
      workplane3d = off
      c1: Circle "PZT" | pos = {xPZT1, -zPZT1}; r = PZTradius
      pt1: Point | p = {xPZT1, }
      pt2: Point | p = {xPZT1, -lenght}
    ext3: Extrude "CylinderingPZT" | workplane = wp2; input = wp2; distance = PZTwidth
    wp6: WorkPlane "Point" | planetype = faceparallel; face = ext3(1) boundaries 4; unite = on
      pt1: Point | p = {-0.002, }
    wp7: WorkPlane "Mesh sectioning"
      planetype = edgeangle
      edge = mov1(1) edges 32
      adjface = mov1(1) boundaries 12
      angle = 90
      unite = on
      r2: Rectangle | size = {0.48, 0.0047}
    cyl1: Cylinder "Damage" | workplane = xyplane; pos = {xPZT1, TotHight, zD+0.055*a}; axistype = y; r = RDam; h = HDam*3
    uni1: Union | input = cyl1, ext3, mov1, wp6; keep = on
    wp9: WorkPlane | planetype = faceparallel; face = mov1(1) boundaries 3; unite = on
      pt1: Point (disabled) | p = {, 0.05}
      pt2: Point | p = {0, -0.064}
    wp10: WorkPlane
      planetype = vertices
      vertex1 = wp9.pt2 points 1
      vertex2 = uni1(1) points 22
      vertex3 = uni1(1) points 27
      unite = on
      r1: Rectangle (disabled) | pos = {-0.3, -0.1}; size = {0.54, 0.62}
    par1: Partition "Partition Objects 1"
      input = cyl1, ext3, uni1, wp6
      keepinput = on
      partitionwith = workplane
      workplane = wp10
    spl1: Split | input = par1(3), par1(4)
    extract1: Extract | input = spl1(1), spl1(4), spl1(8), wp6
    par2: Partition "Partition Objects 2" | input = spl1(4); partitionwith = workplane; workplane = wp7
    mir1: Mirror | input = par2, spl1(1), spl1(8), wp6; keep = on; workplane = wp10
    fin: Finalize "Form Union"

Materials
  mat1: Common "Structural steel" on domains 1, 2, 5, 6
    def "Basic"
      lossfactor = 0.02
      relpermeability = 1
      heatcapacity = 475[J/(kg*K)]
      thermalconductivity = 44.5[W/(m*K)]
      electricconductivity = 4.032e6[S/m]
      relpermittivity = 1
      thermalexpansioncoefficient = 12.3e-6[1/K]
      density = DensityS
    Enu "Young's modulus and Poisson's ratio"
      E = ElasticityS
      nu = PoissonS
      an1: Analytic | funcname = E; expr = 200[GPa]*(1 - 3.34e-4[1/K]*(T - 293.15[K])); args = T; fununit = Pa; argunit = K
      an2: Analytic | funcname = nu; expr = 0.3*(1 + 1e-4[1/K]*(T - 293.15[K])); args = T; fununit = 1; argunit = K
    Murnaghan
      l = -3.0e11[Pa]
      m = -6.2e11[Pa]
      n = -7.2e11[Pa]
    ElastoplasticModel "Elastoplastic material model"
      sigmags = 350[MPa]*a(T)
      Et = 1.045[GPa]*a(T)
      Ek = 1.045[GPa]*a(T)
      sigmagh = 1.050[GPa]*epe*a(T)
      Hillcoefficients = {0, 0, 0, 0, 0, 0}
      ys = {0, 0, 0, 0, 0, 0}
      int1: Interpolation | funcname = a; table = {{600[K], 1}, {1100[K], 0.1}, {1643[K], 0}}; fununit = 1; argunit = K
    Ludwik
      k_lud = 560[MPa]*a(T)
      n_lud = 0.61
      int1: Interpolation | funcname = a; table = {{600[K], 1}, {1100[K], 0.1}, {1643[K], 0}}; fununit = 1; argunit = K
    JohnsonCook
      k_jcook = 560[MPa]
      n_jcook = 0.61
      C_jcook = 0.12
      epet0_jcook = 1[1/s]
      m_jcook = 0.6
    Swift
      e0_swi = 0.021
      n_swi = 0.2
    Voce
      sigma_voc = 249[MPa]*a(T)
      beta_voc = 9.3
      int1: Interpolation | funcname = a; table = {{600[K], 1}, {1100[K], 0.1}, {1643[K], 0}}; fununit = 1; argunit = K
    HockettSherby
      sigma_hoc = 684[MPa]*a(T)
      m_hoc = 3.9
      n_hoc = 0.85
      int1: Interpolation | funcname = a; table = {{600[K], 1}, {1100[K], 0.1}, {1643[K], 0}}; fununit = 1; argunit = K
    ArmstrongFrederick
      Ck = 2.070[GPa]*a(T)
      gammak = 8.0
      int1: Interpolation | funcname = a; table = {{600[K], 1}, {1100[K], 0.1}, {1643[K], 0}}; fununit = 1; argunit = K
    Norton
      A_nor = 1.2e-15[1/s]
      sigRef_nor = 1[MPa]
      n_nor = 4.5
    Garofalo "Garofalo (hyperbolic sine)"
      A_gar = 1e-6[1/s]
      sigRef_gar = 100[MPa]
      n_gar = 4.6
    ChabocheViscoplasticity
      A_cha = 1
      sigRef_cha = 490[MPa]
      n_cha = 9
  mat2: Common "Lead Zirconate Titanate (PZT-5H)" on domains 3, 8
    def "Basic"
      relpermittivity = diag{1704.4, 1704.4, 1433.6}
      density = 7500[kg/m^3]
    StrainCharge "Strain-charge form"
      sE = {1.65e-011[1/Pa], -4.78e-012[1/Pa], -8.45e-012[1/Pa], 0[1/Pa], 0[1/Pa], 0[1/Pa], -4.78e-012[1/Pa], 1.65e-011[1/Pa], -8.45e-012[1/Pa], 0[1/Pa], 0[1/Pa], 0[1/Pa], -8.45e-012[1/Pa], -8.45e-012[1/Pa], 2.07e-011[1/Pa], 0[1/Pa], 0[1/Pa], 0[1/Pa], 0[1/Pa], 0[1/Pa], 0[1/Pa], 4.35e-011[1/Pa], 0[1/Pa], 0[1/Pa], 0[1/Pa], 0[1/Pa], 0[1/Pa], 0[1/Pa], 4.35e-011[1/Pa], 0[1/Pa], 0[1/Pa], 0[1/Pa], 0[1/Pa], 0[1/Pa], 0[1/Pa], 4.26e-011[1/Pa]}
      dET = {0[C/N], 0[C/N], -2.74e-010[C/N], 0[C/N], 0[C/N], -2.74e-010[C/N], 0[C/N], 0[C/N], 5.93e-010[C/N], 0[C/N], 7.41e-010[C/N], 0[C/N], 7.41e-010[C/N], 0[C/N], 0[C/N], 0[C/N], 0[C/N], 0[C/N]}
      epsilonrT = diag{3130, 3130, 3400}
      eta_sE = {0, 0, 0, 0, 0, 0, 0, 0, 0, 0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}
      eta_dET = {0, 0, 0, 0, 0, 0, 0, 0, 0, 0, 0, 0, 0, 0, 0, 0, 0, 0}
      eta_epsilonT = 0
    StressCharge "Stress-charge form"
      cE = {1.27205e+011[Pa], 8.02122e+010[Pa], 8.46702e+010[Pa], 0[Pa], 0[Pa], 0[Pa], 8.02122e+010[Pa], 1.27205e+011[Pa], 8.46702e+010[Pa], 0[Pa], 0[Pa], 0[Pa], 8.46702e+010[Pa], 8.46702e+010[Pa], 1.17436e+011[Pa], 0[Pa], 0[Pa], 0[Pa], 0[Pa], 0[Pa], 0[Pa], 2.29885e+010[Pa], 0[Pa], 0[Pa], 0[Pa], 0[Pa], 0[Pa], 0[Pa], 2.29885e+010[Pa], 0[Pa], 0[Pa], 0[Pa], 0[Pa], 0[Pa], 0[Pa], 2.34742e+010[Pa]}
      eES = {0[C/m^2], 0[C/m^2], -6.62281[C/m^2], 0[C/m^2], 0[C/m^2], -6.62281[C/m^2], 0[C/m^2], 0[C/m^2], 23.2403[C/m^2], 0[C/m^2], 17.0345[C/m^2], 0[C/m^2], 17.0345[C/m^2], 0[C/m^2], 0[C/m^2], 0[C/m^2], 0[C/m^2], 0[C/m^2]}
      epsilonrS = diag{1704.4, 1704.4, 1433.6}
      eta_cE = {0, 0, 0, 0, 0, 0, 0, 0, 0, 0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}
      eta_eES = {0, 0, 0, 0, 0, 0, 0, 0, 0, 0, 0, 0, 0, 0, 0, 0, 0, 0}
      eta_epsilonS = 0
  mat3: Common "BMN-40 (neodymium magnet)" on domains 4, 7
    def "Basic"
      thermalconductivity = 9.0[W/(m*K)]
      density = DenMag
      heatcapacity = 440[J/(kg*K)]
      electricconductivity = 1/1.50[uohm*m]
      relpermittivity = 1
    RemanentFluxDensity
      murec = 1.05
      normBr = Br(T)
      int1: Interpolation | funcname = Br; table = {{293.15, 1.300}, {353.15, 1.21}}; extrap = linear; fununit = T; argunit = K
    Enu "Young's modulus and Poisson's ratio"
      E = EMag
      nu = piossionMag

Physics
  solid: SolidMechanics on all domains
    dependent variable u = {u, v, w}
    lemm1: LinearElasticModel "Linear Elastic Material 1" (default)
      dmp1: Damping on all domains | beta_dK = dampB
    free1: Free (default)
    init1: init "Initial Values 1" (default)
    pzm1: PiezoelectricMaterialModel "Piezoelectric Material 1" on domains 3, 8
  es: Electrostatics on domains 3, 8
    dependent variable V
    ccn1: ChargeConservation (default)
    zc1: ZeroCharge (default)
    init1: init "Initial Values 1" (default)
    ccnp1: ChargeConservationPiezo "Charge Conservation, Piezoelectric 1" on all domains
    gnd1: Ground on boundaries 13, 37
    term1: Terminal on boundaries 14, 40 | TerminalType = Voltage

Multiphysics
  pze1: PiezoelectricEffect on all domains | Solid_physics = solid; Electrostatics_physics = es

Mesh
  mesh1 "Mesh"
    size: MeshSizeDefault "Golobal Size" | hmax = 0.048; hmin = 0.00864; hcurve = 0.6; hnarrow = 0.5; hgrad = 1.5
    ftet1: FreeTet "PZT" on domains 3, 8
      size1: Size on domains 3, 8 | hauto = 2
    ftet2: FreeTet "Top Flange" on domains 2, 6
      size1: Size on domains 2, 6 | hauto = 3
    ftet3: FreeTet "Web&BotFlange" on domains 1, 5
      size1: Size on domains 1, 5
  mesh2 "Mesh 2"
    size: MeshSizeDefault | hmax = 0.048; hmin = 0.00864; hcurve = 0.6; hnarrow = 0.5; hgrad = 1.5
    copy1: Copy (disabled) | mesh = none; destination = all domains
  mesh3 "Mesh 3"
    size: MeshSizeDefault "Golobal Size" | hmax = 0.048; hmin = 0.00864; hcurve = 0.6; hnarrow = 0.5; hgrad = 1.5
    ftet1: FreeTet "PZT" on domains 3, 8
      size1: Size on domains 3, 8 | hauto = 1
    ftet2: FreeTet "Top Flange" on no domains
      size1: Size on no domains | hmax = 0.005; hauto = 1; custom = on
    ftet3: FreeTet "Web&BotFlange" on domains 1, 2, 5, 6
      size1: Size on domains 1, 2, 5, 6 | hauto = 2
  mesh4 "Mesh 4"
    size: MeshSizeDefault "Golobal Size" | hmax = 0.048; hmin = 0.00864; hcurve = 0.6; hnarrow = 0.5; hgrad = 1.5
    ftet1: FreeTet "PZT" on domains 3, 8
      size1: Size on domains 3, 8 | hauto = 2
    ftet2: FreeTet "Top Flange" on no domains
      size1: Size on no domains | hmax = 0.007; hauto = 2; custom = on
    ftet3: FreeTet "Web&BotFlange" on domains 1, 2, 5, 6
      size1: Size on domains 1, 2, 5, 6 | hauto = 3
  mesh5 "Mesh 5"
    size: MeshSizeDefault "Golobal Size" | hmax = 0.048; hmin = 0.00864; hcurve = 0.6; hnarrow = 0.5; hgrad = 1.5
    ftet1: FreeTet "PZT" on domains 3, 8
      size1: Size on domains 3, 8 | hmax = 0.0036; hauto = 1; custom = on
    ftet2: FreeTet "Top Flange" on no domains
      size1: Size on no domains | hmax = 0.004; hauto = 1; custom = on
    ftet3: FreeTet "Web&BotFlange" on domains 1, 2, 5, 6
      size1: Size on domains 1, 2, 5, 6 | hauto = 1
  mesh6 "Mesh 6"
    size: MeshSizeDefault "Golobal Size" | hmax = 0.048; hmin = 0.00864; hcurve = 0.6; hnarrow = 0.5; hgrad = 1.5
    ftet1: FreeTet "PZT" on domains 3, 8
      size1: Size on domains 3, 8 | hmax = 0.0096; hauto = 1
    ftet2: FreeTet "Top Flange" on no domains
      size1: Size on no domains | hmax = 0.0096; hauto = 1
    ftet3: FreeTet "Web&BotFlange" on domains 1, 2, 5, 6
      size1: Size on domains 1, 2, 5, 6 | hauto = 2
  adaptmesh1 "Level 1 Adapted Mesh 1"
    se1: SizeExpression on entire geometry
      evaltype = solution
      sizeexpr = 0.48
      cellsize = 0.0192
      solution = sol3
      horder = {6, 6, 6, 6}
      solupdatenum = 2
    rf1: Reference | sequence = mesh1
      sca1: Scale on entire geometry | scale = 3
  adaptmesh2 "Level 2 Adapted Mesh 2"
    size: MeshSizeDefault | hmax = 0.048; hmin = 0.00864; hcurve = 0.6; hnarrow = 0.5; hgrad = 1.5
    se1: SizeExpression on entire geometry
      evaltype = solution
      sizeexpr = 0.48
      cellsize = 0.0192
      solution = sol4
      horder = {6, 6, 6, 6}
      solupdatenum = 2
    rf1: Reference | sequence = mesh1
      sca1: Scale on entire geometry | scale = 3
  adaptmesh3 "Level 3 Adapted Mesh 3"
    size: MeshSizeDefault | hmax = 0.048; hmin = 0.00864; hcurve = 0.6; hnarrow = 0.5; hgrad = 1.5
    se1: SizeExpression on entire geometry
      evaltype = solution
      sizeexpr = 0.48
      cellsize = 0.0192
      solution = sol5
      horder = {6, 6, 6, 6}
      solupdatenum = 2
    rf1: Reference | sequence = mesh1
      sca1: Scale on entire geometry | scale = 3
  adaptmesh4 "Level 4 Adapted Mesh 4"
    size: MeshSizeDefault | hmax = 0.048; hmin = 0.00864; hcurve = 0.6; hnarrow = 0.5; hgrad = 1.5
    se1: SizeExpression on entire geometry
      evaltype = solution
      sizeexpr = 0.48
      cellsize = 0.0192
      solution = sol6
      horder = {6, 6, 6, 6}
      solupdatenum = 2
    rf1: Reference | sequence = mesh1
      sca1: Scale on entire geometry | scale = 3
  adaptmesh5 "Level 5 Adapted Mesh 5"
    size: MeshSizeDefault | hmax = 0.048; hmin = 0.00864; hcurve = 0.6; hnarrow = 0.5; hgrad = 1.5
    se1: SizeExpression on entire geometry
      evaltype = solution
      sizeexpr = 0.48
      cellsize = 0.0192
      solution = sol7
      horder = {6, 6, 6, 6}
      solupdatenum = 2
    rf1: Reference | sequence = mesh1
      sca1: Scale on entire geometry | scale = 3
  adaptmesh6 "Level 6 Adapted Mesh 6"
    size: MeshSizeDefault | hmax = 0.048; hmin = 0.00864; hcurve = 0.6; hnarrow = 0.5; hgrad = 1.5
    se1: SizeExpression on entire geometry
      evaltype = solution
      sizeexpr = 0.48
      cellsize = 0.0192
      solution = sol8
      horder = {6, 6, 6, 6}
      solupdatenum = 2
    rf1: Reference | sequence = mesh1
      sca1: Scale on entire geometry | scale = 3
  adaptmesh7 "Level 7 Adapted Mesh 7"
    size: MeshSizeDefault | hmax = 0.048; hmin = 0.00864; hcurve = 0.6; hnarrow = 0.5; hgrad = 1.5
    se1: SizeExpression on entire geometry
      evaltype = solution
      sizeexpr = 0.48
      cellsize = 0.0192
      solution = sol9
      horder = {6, 6, 6, 6}
      solupdatenum = 2
    rf1: Reference | sequence = mesh1
      sca1: Scale on entire geometry | scale = 3
  adaptmesh8 "Level 8 Adapted Mesh 8"
    size: MeshSizeDefault | hmax = 0.048; hmin = 0.00864; hcurve = 0.6; hnarrow = 0.5; hgrad = 1.5
    se1: SizeExpression on entire geometry
      evaltype = solution
      sizeexpr = 0.48
      cellsize = 0.0192
      solution = sol10
      horder = {6, 6, 6, 6}
      solupdatenum = 2
    rf1: Reference | sequence = mesh1
      sca1: Scale on entire geometry | scale = 3
  adaptmesh9 "Level 9 Adapted Mesh 9"
    size: MeshSizeDefault | hmax = 0.048; hmin = 0.00864; hcurve = 0.6; hnarrow = 0.5; hgrad = 1.5
    se1: SizeExpression on entire geometry
      evaltype = solution
      sizeexpr = 0.48
      cellsize = 0.0192
      solution = sol11
      horder = {6, 6, 6, 6}
      solupdatenum = 2
    rf1: Reference | sequence = mesh1
      sca1: Scale on entire geometry | scale = 3
  adaptmesh10 "Level 10 Adapted Mesh 10"
    size: MeshSizeDefault | hmax = 0.048; hmin = 0.00864; hcurve = 0.6; hnarrow = 0.5; hgrad = 1.5
    se1: SizeExpression on entire geometry
      evaltype = solution
      sizeexpr = 0.48
      cellsize = 0.0192
      solution = sol12
      horder = {6, 6, 6, 6}
      solupdatenum = 2
    rf1: Reference | sequence = mesh1
      sca1: Scale on entire geometry | scale = 3
    ftet1: FreeTet "Free Tetrahedral 1" on remaining entities

Studies
  std1 "Study 1"
    param: Parametric "Damage location Sweep" (disabled) | pname = zD
    freq: Frequency "Frequency Domain"
      plist = range(79000,500,80000)
      mesh = {geom1, mesh1}
      errestandadap = adaption
      meshadaptmethod = rebuild
      userngen = on
      ngen = 10
      goaluserngen = on
      goalngen = 10
      sweeptype = filled
    freq1: Frequency "Frequency Domain 1" (disabled)
      plist = range(70000,40,80000)
      mesh = {geom1, mesh4}
      adderrestvars = err
      meshadaptmethod = modify
      userngen = on
      ngen = 4
      sweeptype = filled
  std2 "Study 2"
    param: Parametric "Parametric Sweep" | pname = a; plistarr = 0,2,3,4,5,6,7,8,7.5,6.5,5.5
    freq: Frequency "Frequency Domain" | plist = range(30000,40,80000); mesh = {geom1, adaptmesh10}
  std3 "Study 3"
    freq: Frequency "Frequency Domain"
      plist = range(78000,500,80000)
      errestandadap = adaption
      meshadaptmethod = modify
      goalorientedtermination = auto
      userngen = on
      ngen = 10
      goaluserngen = on
      goalngen = 10

Solver configurations
  sol1 "Solution 1" (study std1)
    v1: Variables "Dependent Variables 1"
    s1: Stationary "Stationary Solver 1" | linpmethod = sol
      eeDef: ErrorEstimation
      adDef: Adaption "Adaptive Mesh Refinement"
      p1: Parametric | pname = freq; plistarr = range(79000,500,80000); punit = Hz; pcontinuationmode = no
      fc1: FullyCoupled | linsolver = d1
      d1: Direct "Suggested Direct Solver (pze1) (merged)" | linsolver = pardiso; pivotperturb = 1.0E-9
  sol2 "Adaptive Mesh Refinement Solutions 1" (study std1)

Datasets
  dset1: Solution | solution = sol1
  dset2: Solution | solution = sol2

Plots
  pg1: PlotGroup3D "Stress (solid)" | data = dset2
    vol1: Volume | expr = solid.mises_peak
      def: Deform "Deformation" | expr = {u, v, w}; descr = Displacement field
  pg2: PlotGroup3D "Electric Potential (es)" | data = dset2
    mslc1: Multislice
      expr = V
      multiplanexmethod = coord
      xcoord = es.CPx
      multiplaneymethod = coord
      ycoord = es.CPy
      multiplanezmethod = coord
      zcoord = es.CPz
    strmsl1: StreamlineMultislice
      expr = {es.Ex, es.Ey, es.Ez}
      multiplanexmethod = coord
      xcoord = es.CPx
      multiplaneymethod = coord
      ycoord = es.CPy
      multiplanezmethod = coord
      zcoord = es.CPz
      udist = 0.02
      col1: Color "Color Expression 1" | expr = V
      filt1: Filter | expr = !isScalingSystemDomain
  pg3: PlotGroup3D "Electric Field Norm (es)" | data = dset2
    mslc1: Multislice
      expr = es.normE
      multiplanexmethod = coord
      xcoord = es.CPx
      multiplaneymethod = coord
      ycoord = es.CPy
      multiplanezmethod = coord
      zcoord = es.CPz
    strmsl1: StreamlineMultislice
      expr = {es.Ex, es.Ey, es.Ez}
      multiplanexmethod = coord
      xcoord = es.CPx
      multiplaneymethod = coord
      ycoord = es.CPy
      multiplanezmethod = coord
      zcoord = es.CPz
      udist = 0.02
      col1: Color "Color Expression 1" | expr = es.normE
      filt1: Filter | expr = !isScalingSystemDomain
  pg4: PlotGroup1D "1D Plot Group 4" | data = dset1